# Using Solve Blocks
A := [1, 1; 1, -1]
b := [3; 1]  # Defining the matrix and right hand side vector
v := lsolve(A, b)  # Solving with command lsolve
v = [2; 1]  # Viewing the solution
# Solve Block
solve block
    # guess values
    x := 0
    y := 0
    # constraints
    x + y == 3
    x - y == 1
    # solver
    Solution := Find(x, y)
    # First Equation
    # Second Equation
end solve block
# Equality constraint is written with "Ctrl + ="
# Insert text block with "Ctrl + T"
Solution = [2; 1]
solve block
    # guess values
    x := 6
    y := -10
    z := 2
    # constraints
    x + y + z == 10
    x - y + z == 4
    2*x - y - z == 5
    # solver
    Solution2 := Find(x, y, z)
end solve block
# Ctrl + = gives equality constraint for equations
Solution2 = [5; 3; 2]
solve block
    # guess values
    x := 5
    y := 0
    # constraints
    x + y == 1
    2*x + 2*y == 2
    # solver
    Find(x, y) = [5; -4]
end solve block
# The solution is not uniuqe
# It found "a solution" which changes depending on the initialization.
solve block
    # guess values
    x := 0
    y := -1
    # constraints
    x^2 + y^2 == 2
    x - y == 0
    # solver
    Nonlinear := Find(x, y)
end solve block
# "Ctrl+=" for equality
Nonlinear = [-1; -1]
solve block
    # guess values
    x := -1
    y := 0
    # constraints
    2*x^2 + y^2 == 3
    2*x^2 - y^2 == 1
    # solver
    Nonlinear2 := Find(x, y)
end solve block
Nonlinear2 = [-1; 1]
# Parametric plots: ellipse and hyperbola
t := 0, 0.01 .. 2*π
t2 := -2, -2 + 0.1 .. 2
a := sqrt(3/2)
b := sqrt(3)
Hyperbola
# Insert the plot
a2 := 1/sqrt(2)
b2 := 1
# [plot: b*sin(t), b2*sinh(t2) vs a*cos(t), a2*cosh(t2), -a2*cosh(t2)]
