# Linear Programming
F(x, y) := x + y
solve block
    # guess values
    x := 30
    y := 90
    # constraints
    x ≥ 45
    y ≥ 5
    50*x + 24*y ≤ 2400
    30*x + 33*y ≤ 2100
    # solver
    Sol := Maximize(F, x, y)
end solve block
Sol = [45; 6.25]
# The demand for x is high, but x is expensive and slow to produce. Therefore, we produce exactly as many x as demanded and the rest of the resources go to y.
# Second problem:
P(A, B) := 5*A + 12*B  # Definition of profit
solve block
    # guess values
    A := 0
    B := 0
    # constraints
    A ≥ 0
    B ≥ 0
    20*A + 10*B ≤ 200
    10*A + 20*B ≤ 120
    10*A + 30*B ≤ 150
    # solver
    Solution := Maximize(P, A, B)
end solve block
Solution = [6; 3]
P(6, 3) = 66
