# Computing expressions, Symbolic computations
# 1.  We write the operations from the keyboard using symbols +, -, *, /, ^, etc. Alternatively, we can click on the corresponding operations in the Math tab.
#
# To evaluate the expression we move the cursor to the rightmost end of the expression (pressing the "right" arrow key) then we type "=". When we type "=" the floating point approximation is computed.
#
# To increase the precision of the result: go to Math Formatting
1/(2 + 3/(4 + 5/(6 + 7/(8 + 9/10)))) = 0.379745
# To perform symbolic computations we press "Ctrl + . " or we go to the math tab -> symbolics and we type the right arrow.
1/(2 + 3/(4 + 5/(6 + 7/(8 + 9/10)))) → 2861/7534 = 0.379745
# 2. Expression with radicals. To store the value of the expression in a variable we type the variable name, then ":=" and we write the expression.
#
# To view the value of an expression we type the name and then we type "=".
E := sqrt(1 + nthroot(2 + nthroot(3 + nthroot(4 + nthroot(5 + nthroot(6, 7), 6), 5), 4), 3))
E → sqrt((nthroot((nthroot(6^(1/7) + 5, 6) + 4)^(1/5) + 3, 4) + 2)^(1/3) + 1)
# Symbolic testing for some computations with radicals. First: symbolic expansions. After writing an expression, type "Ctrl + ." (symbolic right arrow, symbolic evaluation). On the arrow we type "expand" or we choose expand from the Math-> Symbolic menu.
(x + y)^10 expand → y^10 + 10*x*y^9 + 45*x^2*y^8 + 120*x^3*y^7 + 210*x^4*y^6 + 252*x^5*y^5 + 210*x^6*y^4 + 120*x^7*y^3 + 45*x^8*y^2 + 10*x^9*y + x^10
(3 + sqrt(5))^2 expand → 6*sqrt(5) + 14
sqrt(6*sqrt(5) + 14) simplify → sqrt(6*sqrt(5) + 14)
9! → 362880
28! → 304888344611713860501504000000
# If we want an "exact" computation we need to perform a symbolic evaluation!
E2 := e^π + π^e + ln(2)^((1 + sqrt(3))/2) = 46.206
# Exercise 3.2: Computing sums. Defining functions.
# To put an already written expression in parantheses, first select the expression, then type "(".
sum(n^2 + n - 1, n = 1 .. 10000) → 333433330000
S(n) := sum(1/k, k = 1 .. n)
S(1) = 1
S(2) = 1.5
S(3) = 1.83333
S(10) → 7381/2520  # Here we did a symbolic evaluation
S(100) → 14466636279520351160221518043104131447711/2788815009188499086581352357412492142272
# Define nother sequence, subtracting ln(n).
γ(n) := S(n) - ln(n)
γ(10000000) = 0.577216
# Making (simple) plots
X := [1, 2, 3, 4, 5, 6, 7, 8, 9, 10]
Y := vectorize(S(X))
Y = [1, 1.5, 1.83333, 2.08333, 2.28333, 2.45, 2.59286, 2.71786, 2.82897, 2.92897]
Z := vectorize(ln(X))
Z = [0, 0.693147, 1.09861, 1.38629, 1.60944, 1.79176, 1.94591, 2.07944, 2.19722, 2.30259]
# [plot: Y, Z vs X]
# Computations with integers: factorization, expansion, etc.
6234758234 factor → 2*41*76033637
60 factor → 2^2*3*5
# Greatest common divisor.
gcd(100, 280) = 20
# Least common multiple.
lcm(1, 2, 3, 4, 5, 6, 7, 8, 9, 10) → 2520
# Combinations of 10 taken in groups of 2.
combin(10, 2) = 45
