# Evaluation of Expressions: Symbolic and Floating Point
# To evaluate an expression we write it and type "=". This evaluation is done in floating point arithmetic.
1 + 2 + 3 + 4 + 5 = 15
sum(i^3, i = 1 .. 10^6) = 2.50001e23
# To evaluate "exactly" the expression, we need "symbolic evaluation". To do this press "Ctrl + .".
sum(i^3, i = 1 .. 10^6) → 250000500000250000000000
# Floating point examples:
nthroot(2 + nthroot(12, 3), 7) + 3^7 + π^6 = 3149.62
# Define a function and evaluate it: use ":=" for defining a function.
f(x) := x + 3 - 2^5/7
f(0) = -1.57143
# Assign variables with ":=".
y := 65
f(y) = 63.4286
# Symbolic computations with integers: factorization
3425379234872 factor → 2^3*7*2477*24694181
# Symbolic computations of derivatives and primitives. (Use symbolic evaluation!)
g(x) := sin(x) + cos(x^2 - 3) + x^5
d/dx(x^2) → 2*x
d/dx(g(x)) → -(2*x*sin(x^2 - 3)) + cos(x) + 5*x^4
d/dx((x^4 + x^3 - x - 1)/(x^2 + 20)) → (21*x^2 - 798*x - 420)/(x^4 + 40*x^2 + 400) + 2*x + 1
# Primitives (inverse of derivation):
integral(2*x, x) → x^2
# Not possible every time! Some primitives involve special functions like "erf".
integral(e^(-x^2), x) → sqrt(π)*erf(x)/2
# Partial derivatives: in case you have multiple variables in the expression.
∂/∂t(z^2 + z*t + t^2) → z + 2*t
∂^2/∂t^2(z^2 + z*t + t^2) → 2
# Solving Equations
# Let's solve the equation 2x+3 = 0
2*x + 3 solve → -3/2
# Let's solve the equation x^2 + 3x + 2 = 0
x^2 + 3*x + 2 solve → [-1; -2]
a*x^2 + b*x + c solve, x → [(sqrt(-(4*a*c) + b^2) - b)/(2*a); (-sqrt(-(4*a*c) + b^2) - b)/(2*a)]
# Third degree equations
a*x^3 + b*x^2 + c*x + d solve, x →  # error: The symbolic result returned is too large to display, but it can be used in subsequent calculations if assigned to a function or variable.
x^3 - 3*x + 2 solve → [1; 1; -2]
# Using the command polyroots: write coefficients of the polynom in a vector, then apply the polyroots function to this vector.
v := [1; 1; 1; 1]
polyroots(v) = [-1; -2.21286e-9 + 1i; -1i]
# Interpret the result:
# The polynom is:
x^3 + x^2 + x + 1
# Polyroots provides an approximation for the solutions, not a symbolic computation!
z := 1i
z^2 = -1  # Working with complex numbers: use 1i instead of i.
v2 := [1; 3; 4; -1; -1; 7; -2]
polyroots(v2) = [-0.623184; -0.30007 - 0.344382i; -0.30007 + 0.344382i; 0.675331 + 0.827119i; 0.675331 - 0.827119i; 3.37266]
# Non-linear, non-polynomial equations
x - cos(x) solve → 0.739085133215
# The equation x^2-1 = 0 has two roots -1 and 1.
x := 2
root(x^2 - 1, x) = 1
x := -2
root(x^2 - 1, x) = -1
root(x^2 - 1, x, 0, 2) = 1
# Root is an iterative algorithm. It needs an initialization or an interval where to search for a solution. Ideally, the initialization needs to be close to the desired root. The function must have different signs at the endpoints of the search interval.
x := -4*π, -3.99*π .. 4*π
fun(x) := cos(x)
# [plot: cos(x), x vs x]
