# Linear Systems
M := [2, 3; 3, 5]
N := M^-1 = [5, -3; -3, 2]
# Testing the inverse property:
M*N = [1, 0; 0, 1]
N*M = [1, 0; 0, 1]
# Define RHS vector:
b := [5; 8]
# Computing the solution:
x := M^-1*b
x = [1; 1]
det(M) = 1
# Constructing a singular matrix
M1 := [2, 3; 4, 6]
det(M1) = 0
M1^-1 =  # error: Found a singularity while evaluating this expression. You may be dividing by 0 or inverting a singular matrix.
# Solve directly using "lsolve".
lsolve(M, b) = [1; 1]
A := [1, 3, 5; 0, 2, 11; 1, 2, 1]
det(A) = 3
det(A) = 3
LUA := lu(A) = [0, 0, 1, 1, 0, 0, 1, 2, 1; 1, 0, 0, 1, 1, 0, 0, 1, 4; 0, 1, 0, 0, 2, 1, 0, 0, 3]
P := submatrix(LUA, 0, 2, 0, 2) = [0, 0, 1; 1, 0, 0; 0, 1, 0]
L := submatrix(LUA, 0, 2, 3, 5) = [1, 0, 0; 1, 1, 0; 0, 2, 1]
U := submatrix(LUA, 0, 2, 6, 8) = [1, 2, 1; 0, 1, 4; 0, 0, 3]
L*U = [1, 2, 1; 1, 3, 5; 0, 2, 11]
P*A = [1, 2, 1; 1, 3, 5; 0, 2, 11]
N := 1000  # Type matrix name, then "[" write "i,j" then ":"
i := 0 .. N - 1
j := 0 .. N - 1
V := i
A[i, j] := i + j
A = [
    0, 1, 2, 3, 4, 5, 6, 7, 8, 9, 10, 11;
    1, 2, 3, 4, 5, 6, 7, 8, 9, 10, 11, 12;
    2, 3, 4, 5, 6, 7, 8, 9, 10, 11, 12, 13;
    3, 4, 5, 6, 7, 8, 9, 10, 11, 12, 13, 14;
    4, 5, 6, 7, 8, 9, 10, 11, 12, 13, 14, 15;
    5, 6, 7, 8, 9, 10, 11, 12, 13, 14, 15, 16;
    6, 7, 8, 9, 10, 11, 12, 13, 14, 15, 16, 17;
    7, 8, 9, 10, 11, 12, 13, 14, 15, 16, 17, 18;
    8, 9, 10, 11, 12, 13, 14, 15, 16, 17, 18, 19;
    9, 10, 11, 12, 13, 14, 15, 16, 17, 18, 19, 20;
    10, 11, 12, 13, 14, 15, 16, 17, 18, 19, 20, 21;
    11, 12, 13, 14, 15, 16, 17, 18, 19, 20, 21, 22
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]
A2[i, j] := i - j
A2 = [
    0, -1, -2, -3, -4, -5, -6, -7, -8, -9, -10, -11;
    1, 0, -1, -2, -3, -4, -5, -6, -7, -8, -9, -10;
    2, 1, 0, -1, -2, -3, -4, -5, -6, -7, -8, -9;
    3, 2, 1, 0, -1, -2, -3, -4, -5, -6, -7, -8;
    4, 3, 2, 1, 0, -1, -2, -3, -4, -5, -6, -7;
    5, 4, 3, 2, 1, 0, -1, -2, -3, -4, -5, -6;
    6, 5, 4, 3, 2, 1, 0, -1, -2, -3, -4, -5;
    7, 6, 5, 4, 3, 2, 1, 0, -1, -2, -3, -4;
    8, 7, 6, 5, 4, 3, 2, 1, 0, -1, -2, -3;
    9, 8, 7, 6, 5, 4, 3, 2, 1, 0, -1, -2;
    10, 9, 8, 7, 6, 5, 4, 3, 2, 1, 0, -1;
    11, 10, 9, 8, 7, 6, 5, 4, 3, 2, 1, 0
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]
A[i, j] := if(i < j, 1, 0)
A = [
    0, 1, 1, 1, 1, 1, 1, 1, 1, 1, 1, 1;
    0, 0, 1, 1, 1, 1, 1, 1, 1, 1, 1, 1;
    0, 0, 0, 1, 1, 1, 1, 1, 1, 1, 1, 1;
    0, 0, 0, 0, 1, 1, 1, 1, 1, 1, 1, 1;
    0, 0, 0, 0, 0, 1, 1, 1, 1, 1, 1, 1;
    0, 0, 0, 0, 0, 0, 1, 1, 1, 1, 1, 1;
    0, 0, 0, 0, 0, 0, 0, 1, 1, 1, 1, 1;
    0, 0, 0, 0, 0, 0, 0, 0, 1, 1, 1, 1;
    0, 0, 0, 0, 0, 0, 0, 0, 0, 1, 1, 1;
    0, 0, 0, 0, 0, 0, 0, 0, 0, 0, 1, 1;
    0, 0, 0, 0, 0, 0, 0, 0, 0, 0, 0, 1;
    0, 0, 0, 0, 0, 0, 0, 0, 0, 0, 0, 0
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]
delta := 10^-6
h := 1/N^2
A[i, j] := 1/h*if(|i - j| < delta, 2, if(||i - j| - 1| < delta, -1, 0))
A = [
    2000000, -1000000, 0, 0, 0, 0, 0, 0, 0, 0, 0, 0;
    -1000000, 2000000, -1000000, 0, 0, 0, 0, 0, 0, 0, 0, 0;
    0, -1000000, 2000000, -1000000, 0, 0, 0, 0, 0, 0, 0, 0;
    0, 0, -1000000, 2000000, -1000000, 0, 0, 0, 0, 0, 0, 0;
    0, 0, 0, -1000000, 2000000, -1000000, 0, 0, 0, 0, 0, 0;
    0, 0, 0, 0, -1000000, 2000000, -1000000, 0, 0, 0, 0, 0;
    0, 0, 0, 0, 0, -1000000, 2000000, -1000000, 0, 0, 0, 0;
    0, 0, 0, 0, 0, 0, -1000000, 2000000, -1000000, 0, 0, 0;
    0, 0, 0, 0, 0, 0, 0, -1000000, 2000000, -1000000, 0, 0;
    0, 0, 0, 0, 0, 0, 0, 0, -1000000, 2000000, -1000000, 0;
    0, 0, 0, 0, 0, 0, 0, 0, 0, -1000000, 2000000, -1000000;
    0, 0, 0, 0, 0, 0, 0, 0, 0, 0, -1000000, 2000000
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]
b[i] := 1
b = [
    1; 1; 1; 1; 1; 1; 1; 1; 1; 1
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]
i = [
    0; 1; 2; 3; 4; 5; 6; 7; 8; 9
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]
x := lsolve(A, b)
# [plot: x[i] vs i]
x = [
    0.0005; 0.000999; 0.001497; 0.001994; 0.00249; 0.002985; 0.003479; 0.003972; 0.004464; 0.004955
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]
xtick[i] := i/N
