# Eigenvalues, Eigenvectors
A := [1, 3; 5, 7]
# Compute eigenvalues using "eigvals".
lam := eigenvals(A) = [8.89898; -0.898979]
lam[0] = 8.89898
lam[1] = -0.898979
# Compute eigenvectors using "eigenvecs".
V := eigenvecs(A) = [-0.355051, -0.844949; -0.934847, 0.534847]
# Matrix transpose
TA := transpose(A) = [1, 5; 3, 7]
# Extracting rows, columns: using matrix operators.
Col1 := V[:, 0] = [-0.355051; -0.934847]
Col2 := V[:, 1] = [-0.844949; 0.534847]
# Testing if columns of V are eigenvectors.
A*Col1 = [-3.15959; -8.31918]
lam[0]*Col1 = [-3.15959; -8.31918]
A*Col2 = [0.759592; -0.480816]
lam[1]*Col2 = [0.759592; -0.480816]
# Matrix operations
B := [4, 5; 2, 24]
C := [74, 34; 23, 34]
D := [84, 2; 4, 3]
E := [38, 4; 2, 3]
# Create bigger matrix starting from smaller ones
Block := [B, C; D, E] = [[4, 5; 2, 24], [74, 34; 23, 34]; [84, 2; 4, 3], [38, 4; 2, 3]]
Block = [[4, 5; 2, 24], [74, 34; 23, 34]; [84, 2; 4, 3], [38, 4; 2, 3]]
Block[0, 0] = [4, 5; 2, 24]
Block[0, 1] = [74, 34; 23, 34]
# Construct bigger matrices starting from smaller ones.
augment(B, C) = [4, 5, 74, 34; 2, 24, 23, 34]
B = [4, 5; 2, 24]
C = [74, 34; 23, 34]
stack(B, C) = [4, 5; 2, 24; 74, 34; 23, 34]
# Rows of a matrix
Am := [1, 2, 3; 4, 5, 6; 7, 8, 9] = [1, 2, 3; 4, 5, 6; 7, 8, 9]
Row1 := Am[0, :] = [1, 2, 3]
Row2 := Am[1, :] = [4, 5, 6]
# Rank of matrix
rank(Am) = 2
2*Row2 - Row1 = [7, 8, 9]  # Third row is a (linear) combination of the first two rows.
B := [1, 1; 2, 2]
rank([1, 1; 2, 2]) = 1
# List all rows/columns
i := 0 .. 2 = [0; 1; 2]  # A .. B = [A, A+1, ... B]
SumRows :=
    Sum ← [0, 0, 0]
    for i ∈ 0 .. 2
        Sum ← Sum + Am[i, :]
    Sum
    = [12, 15, 18]
Am = [1, 2, 3; 4, 5, 6; 7, 8, 9]
# Define simple functions:
# Area of the disk in terms of radius:
Ar(r) := π*r^2
Ar(0.3) = 0.282743
Ar(2 m) = 135.263 ft^2
Ar(3 ft) = 0.000262677 hectare
Ar(100 m) = 3.14159 hectare
Ar(100 m) = 0.0121298 mi^2
# Area of disk in terms of diameter:
ArDiskDiam(d) :=
    r ← d/2
    Area ← π*r^2
ArDiskDiam(5) = 19.635
Ar(2.5) = 19.635
# Heron's formula for the area of a triangle:
AreaTriangle(a, b, c) :=
    s ← (a + b + c)/2
    Area ← sqrt((s*(s - a)*(s - b)*(s - c)))
AreaTriangle(3, 4, 5) = 6
AreaTriangle(3, 4.8, 5) = 6.98158
AreaTriangle(1, 1, 2) = 0
AreaTriangle(1, 1, 3) = 1.67705i
# Complex numbers
z := 1i  # The "i" from complex numbers is introduced by typing "1i".
z = 1i
z^2 = -1
(sqrt(2) + 1i*sqrt(5))^10 expand → -(3190i*sqrt(2)*sqrt(5)) - 13443 = -13443 - 10087.7i
(sqrt(2) + 1i*sqrt(5))^10 = -13443 - 10087.7i
# Usually complex number appear when solving general polynomial equations.
# Solve equation symbolically: type the equation, then symbolic evaluation, type "solve" on the arrow.
z^3 - 1 solve → [1; (sqrt(3)*1i - 1)/2; (-(sqrt(3)*1i) - 1)/2]
# Defining a function with an "if" statement.
AbsoluteValue(x) :=
    if x ≥ 0
        Result ← x
    else
        Result ← -x
    Result
AbsoluteValue(2) = 2
AbsoluteValue(-2) = 2
# Gauss Sum: 1+2+3+...+n
i := 1 .. 100
v[i] := i  # Create vector from a range
v := [1, 2, 3, 4, 5]
sum(v) = 15
Sum(n) :=
    Sum ← 0
    for i ∈ 1 .. n
        Sum ← Sum + i
    Sum
Sum(100) → 5050
Sum(1000) → 500500
