x := [1; 2; 3; 4; 5]
y := [0.3; 0.5; 0.2; 0.1; 0.4]
min(x) = 1
max(x) = 5
# Define a range containing points between those in the data.
range := 0, 0.1 .. 1 = [0; 0.1; 0.2; 0.3; 0.4; 0.5; 0.6; 0.7; 0.8; 0.9; 1]
xx := min(x), min(x) + 0.01 .. max(x)
vec1(z) :=
    for e ∈ z
        v[rows(v)] ← e
    v
# Linear Interpolation
vecx := vec1(xx)
data_linear := linterp(x, y, vecx)
# Find Coefficients of the polynomial
poly_coeff := polycoeff(x, y) = [-1.6; 3.275; -1.67917; 0.325; -0.0208333]
length(poly_coeff) = 5
# Define the polynomial
P(z) := sum(poly_coeff[i]*z^i, i = 0 .. length(poly_coeff) - 1)
# [plot: y, data_linear, P(vecx) vs x, vecx]
# Runge phenomenon: interpolation on equally spaced data.
f(x) := 1/(1 + 25*x^2)
Npoints := 21
xxdata := -1, -1 + 0.01 .. 1
xdata := -1, -1 + 2/(Npoints - 1) .. 1
vdata := vec1(xdata)
ydata := f(vdata)
# Compute interpolation polynomial.
poly_coeff2 := polycoeff(vdata, ydata) = [1; 0; -24.1435; 0; 470.846; 0; -6119.22; 0; 49317.5; 0; -245249; 0; 757287; 0; -1442945; 0; 1639177; 2.00816e-8; -1012095; 0; 260179]
P1(z) := sum(poly_coeff2[i]*z^i, i = 0 .. length(poly_coeff2) - 1)
# [plot: ydata, f(xxdata), P1(xxdata) vs vdata, xxdata]
# There is no need of a "Global" function to approximate the data. A "piecewise" function is good enough.
# Using Splines. Degree 3 polynomials between the points. Smooth transition at the points.
spline_coeffs := cspline(vdata, ydata)
f_spline(z) := interp(spline_coeffs, vdata, ydata, z)
# Regression testing
n := 10  # Degree of the regression: polynomial
coeff3 := regress(vdata, ydata, n)
poly3(z) := sum(z^i*coeff3[i + 3], i = 0 .. n)
# [plot: ydata, f(xxdata), f_spline(xxdata), poly3(xxdata) vs vdata, xxdata]
