# Numerical Integration
f1(x) := x^2
# Primitive computation: write the integral operator, put the variable name, evaluate symbolically (Ctrl+".")
F1(x) := integral(f1(x), x) → x^3/3
d/dx(x^3/3) → x^2
F1(x) → x^3/3
# Compute an integral: integrate f1 on the interval [1,2].
integral(f1(x), x = 1 .. 2) → 7/3  # Here Mathcad does numerical integration.
# If we type Ctrl+"." Mathcad does exact computation (if possible).
F1(2) - F1(1) → 7/3
# Graphical representation
dense := 1, 1 + 0.01 .. 2
# [plot: f1(dense) vs dense]
# Some function for which the primitive cannot be computed.
integral(e^(x^2), x) → -(sqrt(-π)*erf(x*1i))/2  # The only way to do the computation is to use another function.
# However we can compute numerically the integral.
a := 0
b := 1
N := 32000
f(x) := e^(x^2)
division := a, (b - a)/N .. b
# Convert to a vector
vec1(z) :=
    for e ∈ z
        v[rows(v)] ← e
    v
integral(f(x), x = a .. b) = 1.46265
values := f(vec1(division))
Approx_Integral := (b - a)/N*sum(values[i], i = 1 .. length(values) - 1) = 1.46268
t := 0 .. 2*π
s := 0 .. π
x(s, t) := cos(s)*cos(t)
y(s, t) := sin(s)*cos(t)
z(s, t) := sin(t)
V := [x; y; z]
# [3D plot: V]
