# Parametric curves in the plane
# Segment: (1-t)*A + t*B
t := 0, 0.01 .. 1
x(t) := (1 - t)*1 + t*5
# Pythagora:
sqrt(4^2 + 1) = 4.12311
y(t) := (1 - t)*3 + t*4
# [plot: y(t) vs x(t)]
Length := integral(sqrt((d/dt(x(t)))^2 + (d/dt(y(t)))^2), t = 0 .. 1) = 4.12311
vec1(z) :=
    for e ∈ z
        v[rows(v)] ← e
    v
# Circle, Ellipses
t1 := 0, 0.01 .. 2*π
v1 := vec1(t1)
r := 1.342
x1(t) := r*cos(t)
y1(t) := r*sin(t)
# [plot: y1 vs x1]
Length1 := integral(sqrt((d/dt(x1(t)))^2 + (d/dt(y1(t)))^2), t = 0 .. 2*π) = 8.43203
# Classical formula:
2*π*r = 8.43203
# Ellipses
a := 2
b := 3
x2(t) := a*cos(t)
y2(t) := b*sin(t)
# [plot: y2 vs x2]
Length2 := integral(sqrt((d/dt(x2(t)))^2 + (d/dt(y2(t)))^2), t = 0 .. 2*π) = 15.8654
# Asteroid curve
t3 := 0, 0.01 .. 2*π
x3(t) := cos(t)^3
y3(t) := sin(t)^3
# [plot: y3(t3) vs x3(t3)]
z3(t) := t
Length3 := integral(sqrt((d/dt(x3(t)))^2 + (d/dt(y3(t)))^2), t = 0 .. 2*π) = 6
v3 := vec1(t3)
w3 := [x3(v3); y3(v3); z3(v3)]
# [3D plot: w3]
Length3_3D := integral(sqrt((d/dt(x3(t)))^2 + (d/dt(y3(t)))^2 + (d/dt(z3(t)))^2), t = 0 .. 2*π) = 8.98671
