# Define a function
f(x) := x^2 - 1.3*x + 1
# Graphical representation
range := -2, -1.99 .. 2
# Minimize this function numerically.
x0 := 1  # Guess, intial point for the algorithm
min_x := Minimize(f, x0)
min_x = 0.65
# [plot: f(range), f(min_x) vs range, min_x]
g(x) := x^6/6 - x^2/2 + x
x1 := 2
min_g := Minimize(g, x1)
min_g = -1.1673
# [plot: g(range), g(min_g) vs range, min_g]
# Plotting a 2D function
h(x, y) := x^2 + y^2 + 0*sin(5*x) + 0*cos(4*y)
range_x := -1, -1 + 0.05 .. 1
range_y := -1, -1 + 0.05 .. 1
x_guess := 1
y_guess := 1
sol := Minimize(h, x_guess, y_guess)
sol = [0; 0]
P := [0, 0, 1]
# [3D plot: h(range_x, range_y)]
# Contour plot
# [contour plot: h(range_x, range_y)]
# The Rosenbrock function
R(x, y) := 100*(y - x^2)^2 + (1 - x)^2
x_range2 := 0, 0 + 0.01 .. 2
y_range2 := 0, 0 + 0.01 .. 2
# [contour plot: R(x_range2, y_range2)]
R_min := Minimize(R, x_guess, y_guess)
R_min = [1; 1]  # The minimizer found the correct solution!!
# Constrained minimization
G(X, Y) := 5*X^2 + 2*Y^2
solve block
    # guess values
    X := 1
    Y := 0
    # constraints
    X - Y == 7
    # solver
    Minimize(G, X, Y) = [2; -5]
end solve block
# To define constraints type "Ctrl+="
